<?xml version="1.0"?>
<?xml-stylesheet type="text/xsl" href="http://jsbsim.sourceforge.net/JSBSim.xsl"?>

<!-- (c) 2017 Joshua Davidson (it0uchpods) -->

<fdm_config name="Tornado" version="2.0" release="ALPHA"
xmlns:xsi="http://www.w3.org/2001/XMLSchema-instance"
xsi:noNamespaceSchemaLocation="http://jsbsim.sourceforge.net/JSBSim.xsd">

	<fileheader>
		<author>Aeromatic, Joshua Davidson (it0uchpods), Other</author>
		<version>Pre V1.0</version>
		<description>Panavia-Tornado-GR4</description>
	</fileheader>

	<metrics>
		<wingarea  unit="FT2">  286.00 </wingarea>
		<wingspan  unit="FT" >   40.00 </wingspan>
		<wing_incidence>          2.00 </wing_incidence>
		<chord     unit="FT" >    7.15 </chord>
		<htailarea unit="FT2">   57.20 </htailarea>
		<htailarm  unit="FT" >   18.60 </htailarm>
		<vtailarea unit="FT2">   61.48 </vtailarea>
		<vtailarm  unit="FT" >   24.60 </vtailarm>
		<location name="AERORP" unit="IN">
			<x> -59.3325 </x>
			<y> 0.00 </y>
			<z> -53.1716 </z>
		</location>
		<location name="EYEPOINT" unit="IN">
			<x> -196.7444 </x>
			<y> 0.00 </y>
			<z> -9.4397 </z>
		</location>
		<location name="VRP" unit="IN">
			<x> -58.3295 </x>
			<y>0</y>
			<z>43</z>
		</location>
	</metrics>

	<mass_balance>
		<ixx unit="SLUG*FT2">     31989 </ixx>
		<iyy unit="SLUG*FT2">     80137 </iyy>
		<izz unit="SLUG*FT2">     88278 </izz>
		<emptywt unit="LBS" >     30620 </emptywt>
		<location name="CG" unit="IN">
			<x> -58.3295 </x>
			<y> 0.00 </y>
			<z> -53.1716 </z>
		</location>

		<pointmass name="Payload">
			<description>Payload</description>
			<weight unit="LBS">   9154.0 </weight>
			<location name="POINTMASS" unit="IN">
			<x> -58.3295 </x>
			<y> 0.00 </y>
			<z> -53.1716 </z>
			</location>
		</pointmass>
	</mass_balance>

	<ground_reactions>
		<contact type="BOGEY" name="NOSE">
			<location unit="IN">
				<x> -164.6311 </x>
				<y> 0.00 </y>
				<z> -85.3338 </z>
			</location>
			<static_friction>  0.80 </static_friction>
			<dynamic_friction> 0.50 </dynamic_friction>
			<rolling_friction> 0.02 </rolling_friction>
			<spring_coeff unit="LBS/FT"> 30935.5 </spring_coeff>
			<damping_coeff unit="LBS/FT/SEC"> 16978.5 </damping_coeff>
			<max_steer unit="DEG"> 45.00 </max_steer>
			<brake_group>NONE</brake_group>
			<retractable>1</retractable>
		</contact>

		<contact type="BOGEY" name="LEFT_MAIN">
			<location unit="IN">
				<x> 40.3295 </x>
				<y> -59.9023 </y>
				<z> -81.1669 </z>
			</location>
			<static_friction>  0.80 </static_friction>
			<dynamic_friction> 0.50 </dynamic_friction>
			<rolling_friction> 0.02 </rolling_friction>
			<spring_coeff unit="LBS/FT"> 59785 </spring_coeff>
			<damping_coeff unit="LBS/FT/SEC"> 23957 </damping_coeff>
			<max_steer unit="DEG">0</max_steer>
			<brake_group>LEFT</brake_group>
			<retractable>1</retractable>
		</contact>

		<contact type="BOGEY" name="RIGHT_MAIN">
			<location unit="IN">
				<x> 40.3295 </x>
				<y> 59.9023 </y>
				<z> -81.1669 </z>
			</location>
			<static_friction>  0.80 </static_friction>
			<dynamic_friction> 0.50 </dynamic_friction>
			<rolling_friction> 0.02 </rolling_friction>
			<spring_coeff unit="LBS/FT"> 59785 </spring_coeff>
			<damping_coeff unit="LBS/FT/SEC"> 23957 </damping_coeff>
			<max_steer unit="DEG">0</max_steer>
			<brake_group>RIGHT</brake_group>
			<retractable>1</retractable>
		</contact>

		<contact type="STRUCTURE" name="LEFT_WING">
			<location unit="IN">
				<x> 40.3295 </x>
				<y> 0.00 </y>
				<z> -53.1716 </z>
			</location>
			<static_friction>  1.00 </static_friction>
			<dynamic_friction> 1.00 </dynamic_friction>
			<spring_coeff unit="LBS/FT"> 50000 </spring_coeff>
			<damping_coeff unit="LBS/FT/SEC"> 50000 </damping_coeff>
		</contact>

		<contact type="STRUCTURE" name="RIGHT_WING">
			<location unit="IN">
				<x> 40.3295 </x>
				<y> 0.00 </y>
				<z> -53.1716 </z>
			</location>
			<static_friction>  1.00 </static_friction>
			<dynamic_friction> 1.00 </dynamic_friction>
			<spring_coeff unit="LBS/FT"> 50000 </spring_coeff>
			<damping_coeff unit="LBS/FT/SEC"> 50000 </damping_coeff>
		</contact>

		<contact type="STRUCTURE" name="RIGHT_WING">
			<location unit="IN">
				<x> 40.3295 </x>
				<y> 0.00 </y>
				<z> -53.1716 </z>
			</location>
			<static_friction>  1.00 </static_friction>
			<dynamic_friction> 1.00 </dynamic_friction>
			<spring_coeff unit="LBS/FT"> 50000 </spring_coeff>
			<damping_coeff unit="LBS/FT/SEC"> 50000 </damping_coeff>
		</contact>
	</ground_reactions>

	<propulsion>
		<engine file="RB199-34R">
			<location unit="IN">
				<x> 217.0370 </x>
				<y> -20.00 </y>
				<z> -53.1716 </z>
			</location>
			<orient unit="DEG">
				<pitch> 0.00 </pitch>
				<roll>  0.00 </roll>
				<yaw>   0.00 </yaw>
			</orient>
			<feed>0</feed>
			<feed>1</feed>
			<thruster file="direct">
				<location unit="IN">
					<x> 217.0370 </x>
					<y> -20.00 </y>
					<z> -53.1716 </z>
				</location>
				<orient unit="DEG">
					<pitch> 0.00 </pitch>
					<roll>  0.00 </roll>
					<yaw>   0.00 </yaw>
				</orient>
			</thruster>
		</engine>

		<engine file="RB199-34R">
			<location unit="IN">
				<x> 217.0370 </x>
				<y> 20.00 </y>
				<z> -53.1716 </z>
			</location>
			<orient unit="DEG">
				<pitch> 0.00 </pitch>
				<roll>  0.00 </roll>
				<yaw>   0.00 </yaw>
			</orient>
			<feed>1</feed>
			<feed>2</feed>
			<thruster file="direct">
				<location unit="IN">
					<x> 217.0370 </x>
					<y> 20.00 </y>
					<z> -53.1716 </z>
				</location>
				<orient unit="DEG">
					<pitch> 0.00 </pitch>
					<roll>  0.00 </roll>
					<yaw>   0.00 </yaw>
				</orient>
			</thruster>
		</engine>

		<tank type="FUEL" number="0">
			<location unit="IN">
				<x> -58.3295 </x>
				<y> -109.0826 </y>
				<z> -53.1716 </z>
			</location>
			<priority>1</priority>
			<capacity unit="LBS"> 4158 </capacity>
			<contents unit="LBS"> 4000 </contents>
		</tank>

		<tank type="FUEL" number="1">
			<location unit="IN">
				<x> -58.3295 </x>
				<y> 0.00 </y>
				<z> -53.1716 </z>
			</location>
			<priority>2</priority>
			<capacity unit="LBS"> 11211 </capacity>
			<contents unit="LBS">  8000 </contents>
		</tank>

		<tank type="FUEL" number="2">
			<location unit="IN">
				<x> -58.3295 </x>
				<y> 109.0826 </y>
				<z> -53.1716 </z>
			</location>
			<priority>1</priority>
			<capacity unit="LBS"> 4158 </capacity>
			<contents unit="LBS"> 4000 </contents>
		</tank>
	</propulsion>

	<system file="throttle" />
	<system file="fcs" />

	<flight_control name="none"/>

	<aerodynamics file="Systems/tornado-aerodynamics.xml" />

	<external_reactions>
	</external_reactions>

</fdm_config>
